# OpenSim document version 40000
Model STS_LaiArnold2017:
  gravity: 0 -9.80665 0
  length_units: meters
  force_units: N
  credits:
    Rajagopal Model w/ torso, arms, updated knee, modified for movements involving high hip and knee flexion
  publications:
    Lai,A.K.M., Arnold, A.S., Wakeling, J.M. (2017) Why are antagonist muscles co-activated in my simulation? A musculoskeletal model for analysing human locomotor tasks. Annals of Biomedical Engineering
  Ground:
    PhysicalOffsetFrame StoolFrame: socket_parent=.. translation=(-0.225 0 0) [meters]
        orientation=(-1.570796 0 0) [radians] meshes=stool_small.stl
  BodySet:
    Body pelvis: mass=11.777 [kg] mass_center=(-0.0707 0 0) inertia=(0.1028 0.0871 0.0579 0 0 0)
        meshes=(r_pelvis.vtp l_pelvis.vtp sacrum.vtp)
      WrapCylinderNew Gmax2_at_pelvis_r: xyz_body_rotation=(-0.75 0.39 0) translation=(-0.08 -0.083 0.068) quadrant=all
          radius=0.04 length=0.1
      WrapCylinderNew PS_at_brim_r: xyz_body_rotation=(-0.25 -0.27 0.1) translation=(-0.074 -0.06 0.0656) quadrant=-y
          radius=0.05 length=0.1
    Body femur_r: mass=18.6028 mass_center=(0 -0.17 0) inertia=(0.2678 0.0702 0.2824 0 0 0) meshes=r_femur.vtp
      WrapCylinderNew GasMed_at_condyles_r: translation=(0.005 -0.41 0) quadrant=all radius=0.025 length=0.1
      WrapCylinderNew KnExt_at_fem_r: xyz_body_rotation=(-0.0623366 0.0507601 0)
          translation=(0.00358828 -0.402732 0.00209111) quadrant=all radius=0.025 length=0.1
    Body tibia_r: mass=7.415 mass_center=(0 -0.1867 0) inertia=(0.1008 0.0102 0.1022 0 0 0)
        meshes=(r_tibia.vtp r_fibula.vtp)
      WrapCylinderNew GasMed_at_shank_r: xyz_body_rotation=(2.96723 0.0279725 -1.47812)
          translation=(-0.0074 -0.074 -0.0033) quadrant=-y radius=0.059 length=0.1
      WrapCylinderNew SM_at_condyles_r: xyz_body_rotation=(0 -0.1 0) translation=(-0.001 -0.02 0) quadrant=all
          radius=0.0345 length=0.1
    Body patella_r: mass=0.1724 mass_center=(0.0018 0.0264 0) inertia=(5.74e-6 2.622e-5 2.622e-5 0 0 0)
        meshes=r_patella.vtp
    Body talus_r: mass=0.2 mass_center=(0 0 0) inertia=(0.002 0.002 0.002 0 0 0) meshes=r_talus.vtp
    Body calcn_r: mass=2.5 mass_center=(0.1 0.03 0) inertia=(0.0028 0.0078 0.0082 0 0 0) meshes=r_foot.vtp
      PhysicalOffsetFrame heel_cnctFrame: socket_parent=.. translation=(0 0 0)
    Body toes_r: mass=0.4332 mass_center=(0.0346 0.006 -0.0175) inertia=(0.0002 0.0004 0.002 0 0 0) meshes=r_bofoot.vtp
      PhysicalOffsetFrame toes_cnctFrame: socket_parent=.. translation=(0.03 0 0)
    Body torso: mass=34.2416 mass_center=(-0.03 0.32 0) inertia=(1.4745 0.7555 1.4314 0 0 0)
        meshes=(hat_spine.vtp hat_jaw.vtp hat_skull.vtp hat_ribs_scap.stl)
  JointSet:
    WeldJoint ground_calcn_r: socket_parent_frame=ground_offset socket_child_frame=calcn_r_offset
      PhysicalOffsetFrame ground_offset: socket_parent=/ground translation=(0 0 0)
      PhysicalOffsetFrame calcn_r_offset: socket_parent=/bodyset/calcn_r translation=(0 0 0)
    PinJoint ankle: socket_parent_frame=tibia_r_offset socket_child_frame=talus_r_offset
      Coordinate ankle_angle: default_value=0.4363323 range=(-0.6981317 0.5235988) clamped=true
      PhysicalOffsetFrame tibia_r_offset: socket_parent=/bodyset/tibia_r translation=(-0.01 -0.4 0)
      PhysicalOffsetFrame talus_r_offset: socket_parent=/bodyset/talus_r translation=(0 0 0)
    WeldJoint subtalar: socket_parent_frame=talus_r_offset socket_child_frame=calcn_r_offset
      PhysicalOffsetFrame talus_r_offset: socket_parent=/bodyset/talus_r translation=(-0.04877 -0.04195 0.00792)
      PhysicalOffsetFrame calcn_r_offset: socket_parent=/bodyset/calcn_r translation=(0 0 0)
    WeldJoint mtp: socket_parent_frame=calcn_r_offset socket_child_frame=toes_r_offset
      PhysicalOffsetFrame calcn_r_offset: socket_parent=/bodyset/calcn_r translation=(0.1788 -0.002 0.00108)
      PhysicalOffsetFrame toes_r_offset: socket_parent=/bodyset/toes_r translation=(0 0 0)
    CustomJoint walker_knee: socket_parent_frame=femur_r_offset socket_child_frame=tibia_r_offset
      Coordinate knee_angle: default_value=1.745329 range=(0 2.443461) clamped=true
      PhysicalOffsetFrame femur_r_offset: socket_parent=/bodyset/femur_r translation=(-0.0045 -0.4096 -0.00175)
          orientation=(-1.5708 1.44618 1.5708)
      PhysicalOffsetFrame tibia_r_offset: socket_parent=/bodyset/tibia_r
          translation=(-0.00808954 -0.0035348 -0.00148474) orientation=(-1.5708 1.44618 1.5708)
      SpatialTransform: axes_held_at_zero=(rotation2 rotation3 translation1)
        TransformAxis rotation1: coordinates=knee_angle axis=(1 0 0) LinearFunction(coefficients=1 0)
        TransformAxis translation2: coordinates=knee_angle axis=(0 1 0)
          SimmSpline: x=(0 0.174533 0.349066 0.523599 0.698132 0.872665 1.0472 1.22173 1.39626 1.5708 1.74533 1.91986 2.0944)
              y=(0 0.000301 0.000143 -0.000401 -0.001233 -0.002243 -0.003316 -0.004346 -0.005239 -0.005924 -0.006361 -0.006539 -0.00648)
        TransformAxis translation3: coordinates=knee_angle axis=(0 0 1)
          SimmSpline: x=(0 0.174533 0.349066 0.523599 0.698132 0.872665 1.0472 1.22173 1.39626 1.5708 1.74533 1.91986 2.0944)
              y=(0 0.001055 0.002061 0.00289 0.003447 0.003676 0.003559 0.00311 0.002373 0.001418 0.000329 -0.000805 -0.001898)
    CustomJoint patellofemoral: socket_parent_frame=femur_r_offset socket_child_frame=patella_r_offset
      Coordinate knee_angle_beta: default_value=1.745329 range=(-99999.9 99999.9) clamped=false
      PhysicalOffsetFrame femur_r_offset: socket_parent=/bodyset/femur_r translation=(-0.00809 -0.40796 -0.00275)
      PhysicalOffsetFrame patella_r_offset: socket_parent=/bodyset/patella_r translation=(0 0 0)
      SpatialTransform: axes_held_at_zero=(rotation2 rotation3)
        TransformAxis rotation1: coordinates=knee_angle_beta axis=(0 0 1)
          SimmSpline: x=(0 0.174533 0.349066 0.523599 0.698132 0.872665 1.0472 1.22173 1.39626 1.5708 1.74533 1.91986 2.0944)
              y=(0.00113686 -0.00629212 -0.105582 -0.253683 -0.414245 -0.579047 -0.747244 -0.91799 -1.09044 -1.26379 -1.43763 -1.61186 -1.78634)
        TransformAxis translation1: coordinates=knee_angle_beta axis=(1 0 0)
          SimmSpline: x=(0 0.174533 0.349066 0.523599 0.698132 0.872665 1.0472 1.22173 1.39626 1.5708 1.74533 1.91986 2.0944)
              y=(0.0524 0.0488 0.0437 0.0371 0.0296 0.0216 0.0136 0.0057 -0.0019 -0.0088 -0.0148 -0.0196 -0.0227)
        TransformAxis translation2: coordinates=knee_angle_beta axis=(0 1 0)
          SimmSpline: x=(0 0.174533 0.349066 0.523599 0.698132 0.872665 1.0472 1.22173 1.39626 1.5708 1.74533 1.91986 2.0944)
              y=(-0.0108 -0.019 -0.0263 -0.0322 -0.0367 -0.0395 -0.0408 -0.0404 -0.0384 -0.0349 -0.0301 -0.0245 -0.0187)
        TransformAxis translation3: axis=(0 0 1) Constant(value=0.00275)
    PinJoint hip: socket_parent_frame=pelvis_offset socket_child_frame=femur_r_offset
      Coordinate hip_flexion: default_value=1.48353 range=(-0.5235988 2.094395) clamped=true
      PhysicalOffsetFrame pelvis_offset: socket_parent=/bodyset/pelvis translation=(-0.056276 -0.07849 0.07726)
      PhysicalOffsetFrame femur_r_offset: socket_parent=/bodyset/femur_r translation=(0 0 0)
    PinJoint back: socket_parent_frame=pelvis_offset socket_child_frame=torso_offset
      Coordinate lumbar_extension: default_value=-9.802277e-15 range=(-1.570796 1.570796) clamped=true locked=true
      PhysicalOffsetFrame pelvis_offset: socket_parent=/bodyset/pelvis translation=(-0.1007 0.0815 0)
      PhysicalOffsetFrame torso_offset: socket_parent=/bodyset/torso translation=(0 0 0)
  ConstraintSet:
    CoordinateCouplerConstraint patellofemoral_knee_angle_con: independent_coordinate_names=knee_angle
        dependent_coordinate_name=knee_angle_beta scale_factor=1
        coupled_coordinates_function=LinearFunction(coefficients=1 0)
    PointConstraint seatConstraint: socket_body_1=/ground socket_body_2=/bodyset/femur_r
        location_body_1=(-0.1827699 0.511365 -0.007654537) location_body_2=(0 0 0)
  ForceSet:
    Millard2012EquilibriumMuscle [values shared by the 8 below unless stated]: fiber_damping=0.01
        default_activation=0.01 minimum_activation=0.01
      ActiveForceLengthCurve: min_norm_active_fiber_length=0.25 transition_norm_fiber_length=0.77
          max_norm_active_fiber_length=1.9 shallow_ascending_slope=0.75 minimum_value=0
      ForceVelocityCurve: concentric_slope_at_vmax=0 concentric_slope_near_vmax=0.25 isometric_slope=5
          eccentric_slope_at_vmax=0 eccentric_slope_near_vmax=0.15 max_eccentric_velocity_force_multiplier=1.4
      FiberForceLengthCurve: strain_at_zero_force=0 strain_at_one_norm_force=0.7
      TendonForceLengthCurve
    Millard2012EquilibriumMuscle gastroc: max_isometric_force=3752.459 optimal_fiber_length=0.059
        tendon_slack_length=0.387 pennation_angle_at_optimal=0.1656816 [radians]
      PathPoint gasmed_r-P1: femur_r (0.006 -0.385 -0.022)
      PathPoint gasmed_r-P2: calcn_r (0.0044 0.031 -0.0053)
      PathWrap: wrap_object=GasMed_at_shank_r method=hybrid
      PathWrap pathwrap_0: wrap_object=GasMed_at_condyles_r method=hybrid
    Millard2012EquilibriumMuscle glut_max: max_isometric_force=2670.067 optimal_fiber_length=0.157
        tendon_slack_length=0.109 pennation_angle_at_optimal=0.3673821 ignore_tendon_compliance=true
      PathPoint glmax2_r-P1: pelvis (-0.1317 0.0087 0.0462)
      PathPoint glmax2_r-P2: pelvis (-0.1344 -0.0609 0.0813)
      PathPoint glmax2_r-P3: femur_r (-0.045 -0.0584 0.0252)
      PathPoint glmax2_r-P4: femur_r (-0.0156 -0.1016 0.0419)
      PathWrap: wrap_object=Gmax2_at_pelvis_r method=hybrid
    Millard2012EquilibriumMuscle iliopsoas: max_isometric_force=2157.875 optimal_fiber_length=0.1169
        tendon_slack_length=0.09954317 pennation_angle_at_optimal=0.2155251 ignore_tendon_compliance=true
      PathPoint psoas_r-P1: pelvis (-0.0606 0.062 0.039)
      PathPoint psoas_r-P2: pelvis (-0.0205 -0.0654 0.0656)
      PathPoint psoas_r-P3: femur_r (-0.0132 -0.0467 0.0046)
      PathPoint psoas_r-P4: femur_r (-0.0235 -0.0524 0.0088)
      PathWrap: wrap_object=PS_at_brim_r method=hybrid range=(2 3)
    Millard2012EquilibriumMuscle recfem: max_isometric_force=1753.393 optimal_fiber_length=0.0759
        tendon_slack_length=0.4504 pennation_angle_at_optimal=0.2170149
      PathPoint recfem_r-P1: pelvis (-0.024 -0.0388 0.0933)
      PathPoint recfem_r-P2: patella_r (0.01 0.049 0.0007)
      PathPoint recfem_r-P3: patella_r (0.0121 0.0437 -0.001)
      PathPoint recfem_r-P4: patella_r (0.005 0.00247 3e-5)
      PathPoint recfem_r-P5: tibia_r (0.0326 -0.06312 -0.00047)
      PathWrap: wrap_object=KnExt_at_fem_r method=hybrid
    Millard2012EquilibriumMuscle hamstrings: max_isometric_force=3284.372 optimal_fiber_length=0.086
        tendon_slack_length=0.335 pennation_angle_at_optimal=0.2545615
      PathPoint semimem_r-P1: pelvis (-0.0987 -0.114 0.0614)
      PathPoint semimem_r-P2: tibia_r (-0.027 -0.041 -0.0196)
      PathWrap: wrap_object=SM_at_condyles_r method=hybrid
    Millard2012EquilibriumMuscle soleus: max_isometric_force=6339.997 optimal_fiber_length=0.044
        tendon_slack_length=0.28135 pennation_angle_at_optimal=0.3814289
      PathPoint soleus_r-P1: tibia_r (-0.0076 -0.0916 0.0098)
      PathPoint soleus_r-P2: calcn_r (0.0044 0.031 -0.0053)
    Millard2012EquilibriumMuscle tibant: max_isometric_force=1693.455 optimal_fiber_length=0.0683
        tendon_slack_length=0.240461 pennation_angle_at_optimal=0.1951828
      PathPoint tibant_r-P1: tibia_r (0.0154 -0.1312 0.0162)
      PathPoint tibant_r-P2: tibia_r (0.0251 -0.1906 0.0128)
      PathPoint tibant_r-P3: tibia_r (0.0233 -0.3659 -0.0132)
      PathPoint tibant_r-P4: calcn_r (0.1166 0.0178 -0.0305)
    Millard2012EquilibriumMuscle vasti: max_isometric_force=7675.161 optimal_fiber_length=0.117
        tendon_slack_length=0.205 pennation_angle_at_optimal=0.06309973
      PathPoint vasint_r-P1: femur_r (0.029 -0.1924 0.031)
      PathPoint vasint_r-P2: femur_r (0.0335 -0.2084 0.0285)
      PathPoint vasint_r-P3: patella_r (0.0058 0.048 -0.0006)
      PathPoint vasint_r-P4: patella_r (0.005 0.00247 -0.00039)
      PathPoint vasint_r-P5: tibia_r (0.03257 -0.0632 0.00043)
      PathWrap: wrap_object=KnExt_at_fem_r method=hybrid
    ActivationPointActuator assistFx: min_control=0 max_control=1 body=torso point=(-0.03 0.32 0) direction=(1 0 0)
        force_is_global=true optimal_force=400 activation_time_constant=0.1 default_activation=0
    ActivationPointActuator assistFy: min_control=0 max_control=1 body=torso point=(-0.03 0.32 0) direction=(0 1 0)
        force_is_global=true optimal_force=400 activation_time_constant=0.1 default_activation=0
    CoordinateLimitForce ankle_angle_LimitForce: coordinate=ankle_angle upper_stiffness=20 [N*m/degree]
        upper_limit=30 [degrees] lower_stiffness=20 [N*m/degree] lower_limit=-40 [degrees] damping=1
        transition=10 [degrees] compute_dissipation_energy=false
    CoordinateLimitForce knee_angle_LimitForce: coordinate=knee_angle upper_stiffness=20 upper_limit=140
        lower_stiffness=20 lower_limit=0 damping=1 transition=10 compute_dissipation_energy=false
    CoordinateLimitForce hip_flexion_LimitForce: coordinate=hip_flexion upper_stiffness=20 upper_limit=120
        lower_stiffness=20 lower_limit=-30 damping=1 transition=10 compute_dissipation_energy=false
    ObjectGroup hip_flex: members=(iliopsoas recfem)
    ObjectGroup hip_ext: members=(glut_max hamstrings)
    ObjectGroup knee_flex: members=hamstrings
    ObjectGroup knee_ext: members=(recfem vasti)
    ObjectGroup ankle_df: members=tibant
    ObjectGroup ankle_pf: members=soleus
