# OpenSim document version 40000
InverseKinematicsTool:
  results_directory: ./
  model_file: subjectB.osim
  constraint_weight: Inf
  accuracy: 1e-5
  marker_file: trials/Trimmed_subjectB_sides6.trc
  time_range: 0 7.785
  report_errors: true
  output_motion_file: ikResults\Trimmed_subjectB_sides6.mot
  report_marker_locations: false
  IKTaskSet:
    IKMarkerTask RShoulder: apply=true weight=3
    IKMarkerTask LShoulder: apply=true weight=3
    IKMarkerTask RElbow: apply=true weight=0.5
    IKMarkerTask RWrist: apply=true weight=0.5
    IKMarkerTask LElbow: apply=true weight=0.5
    IKMarkerTask LWrist: apply=true weight=0.5
    IKMarkerTask RASIS: apply=true weight=5
    IKMarkerTask LASIS: apply=true weight=5
    IKMarkerTask VSacral: apply=true weight=5
    IKMarkerTask RKnee: apply=true weight=3
    IKMarkerTask RAnkle: apply=true weight=3
    IKMarkerTask RHeel: apply=true weight=2
    IKMarkerTask RToe: apply=true weight=2
    IKMarkerTask LKnee: apply=true weight=3
    IKMarkerTask LAnkle: apply=true weight=2
    IKMarkerTask LHeel: apply=true weight=2
    IKMarkerTask LToe: apply=true weight=2
    IKMarkerTask RKneeMedial: apply=true weight=3
    IKMarkerTask RAnkleMedial: apply=true weight=3
    IKMarkerTask LKneeMedial: apply=true weight=3
    IKMarkerTask LAnkleMedial: apply=true weight=3
