# OpenSim document version 40000
ScaleTool MarkerRegsitration:
  mass: 71 [kg]
  height: 169
  age: -1
  notes: SubjectB
  GenericModelMaker:
    model_file: LaiArnold2017_refined_arms_Updated.osim
    marker_set_file: markersFinal.xml
  ModelScaler:
    apply: false
    scaling_order: measurements
    marker_file: trials/subjectB_tpose1.trc
    time_range: 0 0.1
    preserve_mass_distribution: true
    output_model_file: subjectB.osim
    output_scale_file: subjectB_scaling.xml
  MarkerPlacer:
    apply: true
    marker_file: trials/subjectB_tpose1.trc
    time_range: 0 0.2
    output_motion_file: TPose.mot
    output_model_file: subjectB.osim
    output_marker_file: subjectBMarkers.xml
    max_marker_movement: -1
    IKTaskSet:
      IKMarkerTask RShoulder: apply=true weight=6
      IKMarkerTask LShoulder: apply=true weight=6
      IKMarkerTask RElbow: apply=true weight=1
      IKMarkerTask RWrist: apply=true weight=1
      IKMarkerTask LElbow: apply=true weight=1
      IKMarkerTask LWrist: apply=true weight=1
      IKMarkerTask RASIS: apply=true weight=10
      IKMarkerTask LASIS: apply=true weight=10
      IKMarkerTask VSacral: apply=true weight=5
      IKMarkerTask RKnee: apply=true weight=12
      IKMarkerTask RAnkle: apply=true weight=12
      IKMarkerTask RHeel: apply=true weight=12
      IKMarkerTask RToe: apply=true weight=12
      IKMarkerTask LKnee: apply=true weight=12
      IKMarkerTask LAnkle: apply=true weight=12
      IKMarkerTask LHeel: apply=true weight=12
      IKMarkerTask LToe: apply=true weight=12
      IKMarkerTask RKneeMedial: apply=true weight=12
      IKMarkerTask RAnkleMedial: apply=true weight=12
      IKMarkerTask LKneeMedial: apply=true weight=12
      IKMarkerTask LAnkleMedial: apply=true weight=12
      IKCoordinateTask pelvis_tilt: apply=true weight=20 value_type=default_value value=0
      IKCoordinateTask lumbar_extension: apply=true weight=20 value_type=default_value value=0
