# OpenSim document version 40000
MarkerSet:
  Marker TopHead: torso (-0.02714237 0.6752815 -0.005808489)
  Marker FrontHead: torso (0.1213823 0.6218878 0.004259847)
  Marker RearHead: torso (-0.08146594 0.5790003 -0.01428908)
  Marker RShoulder: torso (0.04362185 0.3281528 0.1716978)
  Marker ROffset: torso (-0.07750272 0.1616859 0.08656127)
  Marker RElbow: humerus_r (0.02130303 -0.3725746 0.04238272)
  Marker RWrist: hand_r (-0.04822714 -0.0583437 -0.01185893)
  Marker LShoulder: torso (0.04520585 0.3374596 -0.1785366)
  Marker LElbow: humerus_l (0.02452683 -0.352699 -0.04954464)
  Marker LWrist: hand_l (-0.0428056 -0.04443218 0.01685397)
  Marker RASIS: pelvis (0.01436291 0.01416198 0.1331612)
  Marker LASIS: pelvis (0.01581041 0.006702659 -0.1308401)
  Marker VSacral: pelvis (-0.1463303 0.01577526 0.003438587)
  Marker RThigh: femur_r (0.1134981 -0.1744593 0.042345)
  Marker RKnee: femur_r (0.007051169 -0.3976674 0.06938036)
  Marker RShank: tibia_r (0.03292871 -0.1858914 0.03088952)
  Marker RAnkle: tibia_r (-0.01211359 -0.3791595 0.04219997)
  Marker RHeel: calcn_r (-0.01281513 0.03692159 -0.006123214)
  Marker RToe: toes_r (0.001985408 0.03548775 -0.02385978)
  Marker LThigh: femur_l (0.1207549 -0.1703283 -0.01203003)
  Marker LKnee: femur_l (-0.001926552 -0.4001889 -0.07494271)
  Marker LShank: tibia_l (0.03807435 -0.1901996 -0.0272856)
  Marker LAnkle: tibia_l (-0.009165179 -0.3684108 -0.04701985)
  Marker LHeel: calcn_l (-0.008749727 0.04040473 -0.001785035)
  Marker LToe: toes_l (0.004544984 0.03698703 0.02813004)
  Marker RKneeMedial: femur_r (-0.01370164 -0.4180498 -0.05786173)
  Marker RAnkleMedial: tibia_r (-0.004242632 -0.3504611 -0.03887031)
  Marker LKneeMedial: femur_l (-0.01392308 -0.4098905 0.05366402)
  Marker LAnkleMedial: tibia_l (-0.009509422 -0.3580304 0.0384868)
