# OpenSim document version 30000
ForceSet ForceSet_CMC:
  defaults: CoordinateActuator default: optimal_force=1
  # Reserve Motors to assist muscles
  CoordinateActuator hip_flexion_reserve: coordinate=hip_flexion optimal_force=100
  CoordinateActuator knee_angle_reserve: coordinate=knee_angle optimal_force=1
  CoordinateActuator ankle_angle_reserve: coordinate=ankle_angle optimal_force=1
