# OpenSim document version 20302
CMC_TaskSet STS_CMC:
  defaults: CMC_Joint default: on=false weight=(1 1 1) wrt_body=-1 express_body=-1 active=(false false false)
      kp=(1 1 1) kv=(1 1 1) ka=(1 1 1) r0=(0 0 0) r1=(0 0 0) r2=(0 0 0) limit=0
  CMC_Joint hip_flexion: weight=(1 1 1) wrt_body=-1 express_body=-1 active=(true false false) kp=(100 1 1) kv=(20 1 1)
      ka=(1 1 1) r0=(0 0 0) r1=(0 0 0) r2=(0 0 0) coordinate=hip_flexion limit=0
  CMC_Joint knee_angle: weight=(1 1 1) wrt_body=-1 express_body=-1 active=(true false false) kp=(100 1 1) kv=(20 1 1)
      ka=(1 1 1) r0=(0 0 0) r1=(0 0 0) r2=(0 0 0) coordinate=knee_angle limit=0
  CMC_Joint ankle_angle: weight=(0.8 1 1) wrt_body=-1 express_body=-1 active=(true false false) kp=(100 1 1)
      kv=(20 1 1) ka=(1 1 1) r0=(0 0 0) r1=(0 0 0) r2=(0 0 0) coordinate=ankle_angle limit=0
