# OpenSim document version 40000
AnalyzeTool 80pctAssisted:
  model_file: vin_80pctAssisted.osim
  replace_force_set: false
  results_directory: ./GUIAnalysis/
  output_precision: 8
  initial_time: 0
  final_time: 1.6
  solve_for_equilibrium_for_auxiliary_states: false
  maximum_number_of_integrator_steps: 20000
  maximum_integrator_step_size: 1
  minimum_integrator_step_size: 1e-8
  integrator_error_tolerance: 1e-5
  external_loads_file: ExternalForces.xml
  states_file: 80pctAssisted.sto
  lowpass_cutoff_frequency_for_coordinates: -1
  AnalysisSet Analyses:
    MuscleAnalysis: start_time=0 end_time=1.6 step_interval=1 in_degrees=true muscle_list=all
        moment_arm_coordinate_list=all compute_moments=true
    OutputReporter: output_paths=(/|com_position /|com_velocity /markerset/torsoCOM|location) start_time=0 end_time=1.6
        step_interval=1 in_degrees=true
