# OpenSim document version 20302
ControlSet Control Set:
  defaults: ControlLinear default: is_model_control=true extrapolate=true default_min=0.02 default_max=1
      filter_on=false use_steps=true kp=100 kv=20
  ControlLinear [values shared by the 8 below unless stated]: is_model_control=true extrapolate=true default_min=0.02
      default_max=1 filter_on=false use_steps=true kp=100 kv=20
  ControlLinear hamstrings.excitation
  ControlLinear glut_max.excitation
  ControlLinear iliopsoas.excitation
  ControlLinear recfem.excitation
  ControlLinear vasti.excitation
  ControlLinear gastroc.excitation
  ControlLinear soleus.excitation
  ControlLinear tibant.excitation
